// SBML level 3 version 1

function Basal_deacetylation_function(v, SIRT1_activity)
  v + SIRT1_activity*0.75;
end

function Constant_flux__irreversible(v)
  v;
end
Constant_flux__irreversible is "Constant flux (irreversible)";

function Hill_Cooperativity(substrate, Shalve, V, h)
  V*(substrate/Shalve)^h/(1 + (substrate/Shalve)^h);
end

model Mitonuclear_communication_model()
  // model units - substance: substance, time: time_unit, volume: volume

  // Compartments:
  compartment compartment_ = 1;

  // Species:
  species AMPK in compartment_ = 10;
  species AMPK_P in compartment_ = 1; AMPK_P is "AMPK-P";
  species PGC1a in compartment_ = 10;
  species PGC1a_P in compartment_ = 1; PGC1a_P is "PGC1a-P";
  species PGC1a_deacet in compartment_ = 1;
  species $SIRT1_activity in compartment_;
  species SIRT1 in compartment_ = 1;
  species NAD in compartment_ = 1;
  species Delay_in_NAD_increase in compartment_ = 1;
  species PARP in compartment_ = 1; PARP is "PARP1";
  species PGC1a_Deacetylation_Activity in compartment_ = 0; PGC1a_Deacetylation_Activity is "Deacetylation_Delay";
  species AICAR_Delay in compartment_ = 0;
  species AICAR_treatment in compartment_ = 0;
  species Glucose in compartment_ = 25;
  species GlucoseDelay in compartment_ = 1;
  species NAD_NegReg in compartment_ = 0;
  species NR_NMN in compartment_ = 0; NR_NMN is "NR-NMN";
  species $AMPK_driven_NAD_source in compartment_ = 1;
  species $AMPK_driven_NegReg_source in compartment_ = 1;
  species $Glucose_source in compartment_ = 25;

  // Parameters:
  quantity_to_number_factor = 1;
  initial_NAD = NAD;
  _AMPK_phosphorylation_k1 = 1;
  _AMPK_dephosphorylation_k1 = 5;
  _PGC1a_phosphorylation_k1 = 1;
  _PGC1a_dephosphorylation_k1 = 10;
  _Induced_PGC1a_deacetylation_k1 = 1.913;
  _PGC1a_acetylation_k1 = 1;
  _DUMMY_REACTION_Delay_in_NAD_Increase_k1 = 10;
  _DUMMY_REACTION_Delay_in_NAD_Increase_2_k1 = 10;
  _NAD_synthesis_v = 0.12;
  _NAD_utilisation_k1 = 0.045;
  _NAD_utilisation_by_PARP_k1 = 0.075;
  _NAD_increase_by_AMPK_Shalve = 1.45;
  _NAD_increase_by_AMPK_V = 0.316228;
  _NAD_increase_by_AMPK_h = 100;
  _Deacetylation_activity_Shalve = 3;
  _Deacetylation_activity_V = 0.01;
  _Deacetylation_activity_h = 30;
  _DUMMY_REACTION_AICAR_stimulus_removal_k1 = 0.293095;
  _AMPK_phosphorylation_induced_by_AICAR_k1 = 3.98586;
  _DUMMY_REACTION_Delay_AICAR_stimulus_Shalve = 0.6672;
  _DUMMY_REACTION_Delay_AICAR_stimulus_V = 0.167159;
  _DUMMY_REACTION_Delay_AICAR_stimulus_h = 9.23537;
  _Basal_PGC1a_deacetylation_v = 0.25;
  _DUMMY_REACTION_PGC1a_Deacetylation_Limiter_k1 = 0.56472;
  _Glucose_induced_AMPK_dephosphorylation_k1 = 5;
  _Glucose_utilisation_k1 = 1;
  _Glucose_DUMMY_REACTION_delay_Shalve = 5.36174;
  _Glucose_DUMMY_REACTION_delay_V = 0.1013;
  _Glucose_DUMMY_REACTION_delay_h = 15.04;
  _Glucose_DUMMY_REACTION_delay_limiter_k1 = 0.1;
  _NAD_negative_regulation_k1 = 0.0609264;
  _DUMMY_REACTION_NegReg_disappearance_k1 = 0.1;
  _NR_NMN_supplementation_Shalve = 100;
  _NR_NMN_supplementation_V = 0.10829;
  _NR_NMN_supplementation_h = 1.5;

  // Assignment rules:
  SIRT1_activity := SIRT1*quantity_to_number_factor*compartment_*NAD*quantity_to_number_factor*compartment_;
  NAD_fold_increase := NAD/initial_NAD;

  // Reactions:
  AMPK_phosphorylation: AMPK => AMPK_P; compartment_*_AMPK_phosphorylation_k1*AMPK; AMPK_phosphorylation is "AMPK basal phosphorylation";
  AMPK_dephosphorylation: AMPK_P => AMPK; compartment_*_AMPK_dephosphorylation_k1*AMPK_P; AMPK_dephosphorylation is "AMPK basal dephosphorylation";
  PGC1a_phosphorylation: AMPK_P + PGC1a => PGC1a_P + AMPK_P; compartment_*_PGC1a_phosphorylation_k1*AMPK_P*PGC1a;
  PGC1a_dephosphorylation: PGC1a_P => PGC1a; compartment_*_PGC1a_dephosphorylation_k1*PGC1a_P;
  Induced_PGC1a_deacetylation: PGC1a_P + PGC1a_Deacetylation_Activity => PGC1a_deacet + PGC1a_Deacetylation_Activity; compartment_*_Induced_PGC1a_deacetylation_k1*PGC1a_P*PGC1a_Deacetylation_Activity; Induced_PGC1a_deacetylation is "PGC1a induced deacetylation";
  PGC1a_acetylation: PGC1a_deacet => PGC1a_P; compartment_*_PGC1a_acetylation_k1*PGC1a_deacet; PGC1a_acetylation is "PGC1a basal acetylation";
  DUMMY_REACTION_Delay_in_NAD_Increase: AMPK_P => Delay_in_NAD_increase + AMPK_P; compartment_*_DUMMY_REACTION_Delay_in_NAD_Increase_k1*AMPK_P; DUMMY_REACTION_Delay_in_NAD_Increase is "Delay Reaction NAD increase by AMPK";
  DUMMY_REACTION_Delay_in_NAD_Increase_2: Delay_in_NAD_increase => ; compartment_*_DUMMY_REACTION_Delay_in_NAD_Increase_2_k1*Delay_in_NAD_increase; DUMMY_REACTION_Delay_in_NAD_Increase_2 is "Dummy Reaction Delay_in_NAD_Increase Removal";
  NAD_synthesis: => NAD; compartment_*Constant_flux__irreversible(_NAD_synthesis_v);
  NAD_utilisation: NAD => ; compartment_*_NAD_utilisation_k1*NAD;
  NAD_utilisation_by_PARP: NAD + PARP => PARP; compartment_*_NAD_utilisation_by_PARP_k1*NAD*PARP;
  NAD_increase_by_AMPK: $AMPK_driven_NAD_source => NAD; compartment_*AMPK_driven_NAD_source*Hill_Cooperativity(Delay_in_NAD_increase, _NAD_increase_by_AMPK_Shalve, _NAD_increase_by_AMPK_V, _NAD_increase_by_AMPK_h);  // modifiers: Delay_in_NAD_increase
  NAD_decrease_by_AMPK: $AMPK_driven_NegReg_source => NAD_NegReg; compartment_*AMPK_driven_NegReg_source*Hill_Cooperativity(Delay_in_NAD_increase, _NAD_increase_by_AMPK_Shalve, _NAD_increase_by_AMPK_V, _NAD_increase_by_AMPK_h);  // modifiers: Delay_in_NAD_increase
  Deacetylation_activity: $SIRT1_activity => PGC1a_Deacetylation_Activity + $SIRT1_activity; compartment_*Hill_Cooperativity(SIRT1_activity, _Deacetylation_activity_Shalve, _Deacetylation_activity_V, _Deacetylation_activity_h); Deacetylation_activity is "Delay Reaction Induced Deacetylation";
  DUMMY_REACTION_AICAR_stimulus_removal: AICAR_Delay => ; compartment_*_DUMMY_REACTION_AICAR_stimulus_removal_k1*AICAR_Delay; DUMMY_REACTION_AICAR_stimulus_removal is "Dummy Reaction AICAR Stimulus Removal";
  AMPK_phosphorylation_induced_by_AICAR: AICAR_Delay + AMPK => AMPK_P + AICAR_Delay; compartment_*_AMPK_phosphorylation_induced_by_AICAR_k1*AICAR_Delay*AMPK; AMPK_phosphorylation_induced_by_AICAR is "AMPK induced phosphorylation by AICAR";
  DUMMY_REACTION_Delay_AICAR_stimulus: AICAR_treatment => AICAR_Delay + AICAR_treatment; compartment_*Hill_Cooperativity(AICAR_treatment, _DUMMY_REACTION_Delay_AICAR_stimulus_Shalve, _DUMMY_REACTION_Delay_AICAR_stimulus_V, _DUMMY_REACTION_Delay_AICAR_stimulus_h); DUMMY_REACTION_Delay_AICAR_stimulus is "Delay Reaction AICAR Stimulus";
  Basal_PGC1a_deacetylation: PGC1a_P => PGC1a_deacet; compartment_*Basal_deacetylation_function(_Basal_PGC1a_deacetylation_v, SIRT1_activity); Basal_PGC1a_deacetylation is "PGC1a basal deacetylation";  // modifiers: SIRT1_activity
  DUMMY_REACTION_PGC1a_Deacetylation_Limiter: PGC1a_Deacetylation_Activity => ; compartment_*_DUMMY_REACTION_PGC1a_Deacetylation_Limiter_k1*PGC1a_Deacetylation_Activity; DUMMY_REACTION_PGC1a_Deacetylation_Limiter is "Dummy Reaction Induced Deacetylation Delay Removal";
  Glucose_induced_AMPK_dephosphorylation: GlucoseDelay + AMPK_P => AMPK + GlucoseDelay; compartment_*_Glucose_induced_AMPK_dephosphorylation_k1*GlucoseDelay*AMPK_P; Glucose_induced_AMPK_dephosphorylation is "Glucose-induced AMPK dephosphorylation";
  Glucose_input: $Glucose_source => Glucose; compartment_*Glucose_source; Glucose_input is "Glucose influx";
  Glucose_utilisation: Glucose => ; compartment_*_Glucose_utilisation_k1*Glucose;
  Glucose_DUMMY_REACTION_delay: Glucose => GlucoseDelay + Glucose; compartment_*Hill_Cooperativity(Glucose, _Glucose_DUMMY_REACTION_delay_Shalve, _Glucose_DUMMY_REACTION_delay_V, _Glucose_DUMMY_REACTION_delay_h); Glucose_DUMMY_REACTION_delay is "Delay Reaction Glucose Stimulus";
  Glucose_DUMMY_REACTION_delay_limiter: GlucoseDelay => ; compartment_*_Glucose_DUMMY_REACTION_delay_limiter_k1*GlucoseDelay; Glucose_DUMMY_REACTION_delay_limiter is "Dummy Reaction Glucose Delay Removal";
  NAD_negative_regulation: NAD + NAD_NegReg => ; compartment_*_NAD_negative_regulation_k1*NAD*NAD_NegReg;
  DUMMY_REACTION_NegReg_disappearance: NAD_NegReg => ; compartment_*_DUMMY_REACTION_NegReg_disappearance_k1*NAD_NegReg; DUMMY_REACTION_NegReg_disappearance is "Dummy Reaction NegReg Removal";
  NR_NMN_supplementation: NR_NMN => NAD; compartment_*Hill_Cooperativity(NR_NMN, _NR_NMN_supplementation_Shalve, _NR_NMN_supplementation_V, _NR_NMN_supplementation_h); NR_NMN_supplementation is "NR/NMN supplementation";

  // Unit definitions:
  unit volume = 1e-3 litre;
  unit time_unit = 3600 second;
  unit substance = 1e-3 mole;
end
