// SBML level 2 version 4

function Constant_flux__irreversible(v)
  v;
end
Constant_flux__irreversible is "Constant flux (irreversible)";

function Function_for_PGC1a_induced_deacetylation(Induced_PGC1a_deacetylation_k1, PGC1a_Deacetylation_Activity, PGC1a_P)
  Induced_PGC1a_deacetylation_k1*PGC1a_P*PGC1a_Deacetylation_Activity;
end

function Function_for_PGC1a_phosphorylation(AMPK_P, PGC1a, PGC1a_phosphorylation_k1)
  PGC1a_phosphorylation_k1*AMPK_P*PGC1a;
end

function Function_for_Delay_Reaction_NAD_increase_by_AMPK(AMPK_P, DUMMY_REACTION_Delay_in_NAD_Increase_k1)
  DUMMY_REACTION_Delay_in_NAD_Increase_k1*AMPK_P;
end

function Function_for_NAD_utilisation_by_PARP(NAD, NAD_utilisation_by_PARP_k1, PARP)
  NAD_utilisation_by_PARP_k1*NAD*PARP;
end

function Hill_Cooperativity_1_1(Delay_in_NAD_increase, NAD_increase_by_AMPK_Shalve, NAD_increase_by_AMPK_V, NAD_increase_by_AMPK_h)
  NAD_increase_by_AMPK_V*(Delay_in_NAD_increase/NAD_increase_by_AMPK_Shalve)^NAD_increase_by_AMPK_h/(1 + (Delay_in_NAD_increase/NAD_increase_by_AMPK_Shalve)^NAD_increase_by_AMPK_h);
end

function Hill_Cooperativity_1_2(Deacetylation_activity_Shalve, Deacetylation_activity_V, Deacetylation_activity_h, SIRT1_activity)
  Deacetylation_activity_V*(SIRT1_activity/Deacetylation_activity_Shalve)^Deacetylation_activity_h/(1 + (SIRT1_activity/Deacetylation_activity_Shalve)^Deacetylation_activity_h);
end

function Function_for_AMPK_induced_phosphorylation_by_AICAR(AICAR_Delay, AMPK, AMPK_phosphorylation_induced_by_AICAR_k1)
  AMPK_phosphorylation_induced_by_AICAR_k1*AICAR_Delay*AMPK;
end

function Hill_Cooperativity_1_3(AICAR_treatment, DUMMY_REACTION_Delay_AICAR_stimulus_Shalve, DUMMY_REACTION_Delay_AICAR_stimulus_V, DUMMY_REACTION_Delay_AICAR_stimulus_h)
  DUMMY_REACTION_Delay_AICAR_stimulus_V*(AICAR_treatment/DUMMY_REACTION_Delay_AICAR_stimulus_Shalve)^DUMMY_REACTION_Delay_AICAR_stimulus_h/(1 + (AICAR_treatment/DUMMY_REACTION_Delay_AICAR_stimulus_Shalve)^DUMMY_REACTION_Delay_AICAR_stimulus_h);
end

function Basal_deacetylation_function_1(Basal_PGC1a_deacetylation_v, SIRT1_activity)
  Basal_PGC1a_deacetylation_v + SIRT1_activity*0.75;
end

function Function_for_Glucose_induced_AMPK_dephosphorylation(AMPK_P, GlucoseDelay, Glucose_induced_AMPK_dephosphorylation_k1)
  Glucose_induced_AMPK_dephosphorylation_k1*GlucoseDelay*AMPK_P;
end
Function_for_Glucose_induced_AMPK_dephosphorylation is "Function for Glucose-induced AMPK dephosphorylation";

function Hill_Cooperativity_1_4(Glucose, Glucose_DUMMY_REACTION_delay_Shalve, Glucose_DUMMY_REACTION_delay_V, Glucose_DUMMY_REACTION_delay_h)
  Glucose_DUMMY_REACTION_delay_V*(Glucose/Glucose_DUMMY_REACTION_delay_Shalve)^Glucose_DUMMY_REACTION_delay_h/(1 + (Glucose/Glucose_DUMMY_REACTION_delay_Shalve)^Glucose_DUMMY_REACTION_delay_h);
end

function Hill_Cooperativity_1_5(NR_NMN, NR_NMN_supplementation_Shalve, NR_NMN_supplementation_V, NR_NMN_supplementation_h)
  NR_NMN_supplementation_V*(NR_NMN/NR_NMN_supplementation_Shalve)^NR_NMN_supplementation_h/(1 + (NR_NMN/NR_NMN_supplementation_Shalve)^NR_NMN_supplementation_h);
end

model Mitonuclear_communication_model()

  // Compartments:
  compartment default = 1 volume;
  compartment compartment_ in default = 1 volume;

  // Species:
  species AMPK in compartment_ = 10;
  species AMPK_P in compartment_ = 1; AMPK_P is "AMPK-P";
  species PGC1a in compartment_ = 10;
  species PGC1a_P in compartment_ = 1; PGC1a_P is "PGC1a-P";
  species PGC1a_deacet in compartment_ = 1;
  species $SIRT1_activity in compartment_ = 1;
  species NAD in compartment_ = 1;
  species Delay_in_NAD_increase in compartment_ = 1;
  species PARP in compartment_ = 1; PARP is "PARP1";
  species PGC1a_Deacetylation_Activity in compartment_ = 0; PGC1a_Deacetylation_Activity is "Deacetylation_Delay";
  species AICAR_treatment in compartment_ = 0;
  species Glucose in compartment_ = 25;
  species GlucoseDelay in compartment_ = 1; GlucoseDelay is "GlucoseDelayA";
  species NAD_NegReg in compartment_ = 0;
  species NR_NMN in compartment_ = 0; NR_NMN is "NR-NMN";
  species s11 in compartment_ = 0;
  species s12 in compartment_ = 0;
  species SIRT in compartment_ = 0;
  species AICAR_DelayI in compartment_ = 0;
  species AICAR_DelayA in compartment_ = 0;
  species GlucoseDelayI in compartment_ = 0;
  species Mito_new in default = 0;
  species MitoOld in default = 0;
  species MitoRegenerationDelay in default = 0;
  species Damage in default = 0;
  species Mitogenesis_phagy in default = 0; Mitogenesis_phagy is "Mitogenesis / phagy";
  species s52 in compartment_ = 0;
  species s54 in compartment_ = 0;
  species s55 in compartment_ = 0;
  species s56 in compartment_ = 0;
  species s57 in compartment_ = 0;
  species s58 in compartment_ = 0;
  species s59 in compartment_ = 0;
  species s60 in compartment_ = 0;
  species s61 in default = 0;
  species s62 in default = 0;
  species s63 in compartment_ = 0;
  species s64 in compartment_ = 0;
  species s65 in default = 0;
  species s66 in default = 0;
  species s67 in compartment_ = 0;

  // Parameters:
  quantity_to_number_factor = 1;
  AMPK_phosphorylation_k1 = 1;
  AMPK_dephosphorylation_k1 = 5;
  PGC1a_phosphorylation_k1 = 1;
  PGC1a_dephosphorylation_k1 = 10;
  Induced_PGC1a_deacetylation_k1 = 1.913;
  PGC1a_acetylation_k1 = 1;
  DUMMY_REACTION_Delay_in_NAD_Increase_k1 = 10;
  DUMMY_REACTION_Delay_in_NAD_Increase_2_k1 = 10;
  NAD_synthesis_v = 0.12;
  NAD_utilisation_k1 = 0.045;
  NAD_utilisation_by_PARP_k1 = 0.075;
  NAD_increase_by_AMPK_Shalve = 1.45;
  NAD_increase_by_AMPK_V = 0.316228;
  NAD_increase_by_AMPK_h = 100;
  Deacetylation_activity_Shalve = 3;
  Deacetylation_activity_V = 0.01;
  Deacetylation_activity_h = 30;
  DUMMY_REACTION_AICAR_stimulus_removal_k1 = 0.293095;
  AMPK_phosphorylation_induced_by_AICAR_k1 = 3.98586;
  DUMMY_REACTION_Delay_AICAR_stimulus_Shalve = 0.6672;
  DUMMY_REACTION_Delay_AICAR_stimulus_V = 0.167159;
  DUMMY_REACTION_Delay_AICAR_stimulus_h = 9.23537;
  Basal_PGC1a_deacetylation_v = 0.25;
  DUMMY_REACTION_PGC1a_Deacetylation_Limiter_k1 = 0.56472;
  Glucose_induced_AMPK_dephosphorylation_k1 = 5;
  Glucose_input_v = 25;
  Glucose_utilisation_k1 = 1;
  Glucose_DUMMY_REACTION_delay_Shalve = 5.36174;
  Glucose_DUMMY_REACTION_delay_V = 0.1013;
  Glucose_DUMMY_REACTION_delay_h = 15.04;
  Glucose_DUMMY_REACTION_delay_limiter_k1 = 0.1;
  NAD_negative_regulation_k1 = 0.0609264;
  DUMMY_REACTION_NegReg_disappearance_k1 = 0.1;
  NR_NMN_supplementation_Shalve = 100;
  NR_NMN_supplementation_V = 0.10829;
  NR_NMN_supplementation_h = 1.5;

  // Reactions:
  AMPK_phosphorylation: AMPK => AMPK_P; compartment_*AMPK_phosphorylation_k1*AMPK; AMPK_phosphorylation is "AMPK basal phosphorylation";
  AMPK_dephosphorylation: AMPK_P => AMPK; compartment_*AMPK_dephosphorylation_k1*AMPK_P; AMPK_dephosphorylation is "AMPK basal dephosphorylation";
  PGC1a_phosphorylation: PGC1a => PGC1a_P; compartment_*Function_for_PGC1a_phosphorylation(AMPK_P, PGC1a, PGC1a_phosphorylation_k1);  // modifiers: AMPK_P
  PGC1a_dephosphorylation: PGC1a_P => PGC1a; compartment_*PGC1a_dephosphorylation_k1*PGC1a_P;
  Induced_PGC1a_deacetylation: PGC1a_P => PGC1a_deacet; compartment_*Function_for_PGC1a_induced_deacetylation(Induced_PGC1a_deacetylation_k1, PGC1a_Deacetylation_Activity, PGC1a_P); Induced_PGC1a_deacetylation is "PGC1a induced deacetylation";  // modifiers: PGC1a_Deacetylation_Activity
  PGC1a_acetylation: PGC1a_deacet => PGC1a_P; compartment_*PGC1a_acetylation_k1*PGC1a_deacet; PGC1a_acetylation is "PGC1a basal acetylation";
  AMPK_phosphorylation_induced_by_AICAR: AMPK => AMPK_P; compartment_*Function_for_AMPK_induced_phosphorylation_by_AICAR(AICAR_Delay, AMPK, AMPK_phosphorylation_induced_by_AICAR_k1); AMPK_phosphorylation_induced_by_AICAR is "AMPK induced phosphorylation by AICAR";  // modifiers: AICAR_DelayA
  Basal_PGC1a_deacetylation: PGC1a_P => PGC1a_deacet; compartment_*Basal_deacetylation_function_1(Basal_PGC1a_deacetylation_v, SIRT1_activity); Basal_PGC1a_deacetylation is "PGC1a basal deacetylation";  // modifiers: SIRT1_activity
  Glucose_induced_AMPK_dephosphorylation: AMPK_P => AMPK; compartment_*Function_for_Glucose_induced_AMPK_dephosphorylation(AMPK_P, GlucoseDelay, Glucose_induced_AMPK_dephosphorylation_k1); Glucose_induced_AMPK_dephosphorylation is "Glucose-induced AMPK dephosphorylation";  // modifiers: GlucoseDelay
  Glucose_input: s11 => Glucose; compartment_*Constant_flux__irreversible(Glucose_input_v); Glucose_input is "Glucose influx";
  Glucose_utilisation: Glucose => s12; compartment_*Glucose_utilisation_k1*Glucose;
  NR_NMN_supplementation: NR_NMN => NAD; compartment_*Hill_Cooperativity_1_5(NR_NMN, NR_NMN_supplementation_Shalve, NR_NMN_supplementation_V, NR_NMN_supplementation_h); NR_NMN_supplementation is "NR/NMN supplementation";
  re28: NAD + SIRT => $SIRT1_activity; ;
  re29: AICAR_DelayI => AICAR_DelayA; ;  // modifiers: AICAR_treatment
  re30: AICAR_DelayA => AICAR_DelayI; ;
  re31: GlucoseDelayI => GlucoseDelay; ;  // modifiers: Glucose
  re32: GlucoseDelay => GlucoseDelayI; ;
  re52: Mito_new => MitoOld; ;  // modifiers: Damage
  re56: MitoOld => MitoRegenerationDelay; ;  // modifiers: Mitogenesis_phagy
  re57: MitoRegenerationDelay => Mito_new; ;
  re59: Mito_new => MitoRegenerationDelay; ;  // modifiers: Mitogenesis_phagy
  re63: s52 => Delay_in_NAD_increase; ;  // modifiers: AMPK_P
  re64: Delay_in_NAD_increase => s54; ;
  re65: PGC1a_Deacetylation_Activity => s56; ;
  re66: s55 => PGC1a_Deacetylation_Activity; ;  // modifiers: SIRT1_activity
  re67: s58 => NAD_NegReg; ;  // modifiers: Delay_in_NAD_increase
  re68: NAD_NegReg => s57; ;
  re69: NAD_NegReg + NAD => s67; ;
  re70: NAD => s59; ;  // modifiers: SIRT
  re71: NAD => s59; ;  // modifiers: PARP
  re72: NAD => s59; ;
  re73: s60 => NAD; ;  // modifiers: Delay_in_NAD_increase
  re74: s61 => Mitogenesis_phagy; ;  // modifiers: PGC1a_deacet
  re75: Mitogenesis_phagy => s62; ;
  re76: s63 => AICAR_treatment; ;  // modifiers: MitoOld
  re77: AICAR_treatment => s64; ;
  re78: Damage => s66; ;
  re79: s65 => Damage; ;  // modifiers: Mito_new
  re80: s65 => Damage; ;  // modifiers: MitoOld

  // Unit definitions:
  unit volume = 1e-3 litre;
  unit time = 3600 second;
  unit substance = 1e-3 mole;
  unit area = metre^2;
  unit length = metre;
end
